solve block
    # guess values
    P0000 := 0
    P0100 := 0.1
    P0001 := 0.1
    P1100 := 0.1
    P0101 := 0.1
    P0011 := 0.1
    P1101 := 0.1
    P0111 := 0.1
    P1111 := 0.1
    p1 := 0.3
    p2 := 0.55
    p3 := 0.65
    # constraints
    P0000 == p1*P0000 + p1*(1 - p3)*P0001
    P0100 == (1 - p1)*P0000 + p1*(1 - p2)*P0100 + (1 - p1)*(1 - p3)*P0001 + p1*p2*P1100 + p1*p2*(1 - p3)*P0101
    P0001 == p1*(1 - p2)*P0100 + p1*p3*P0001 + p1*(1 - p2)*(1 - p3)*P0101 + p1*(1 - p3)*P0011
    P1100 == (1 - p1)*p2*P0100 + (p1*p2 + (1 - p1)*p2)*P1100 + (1 - p1)*p2*(1 - p3)*P0101 + (p1*p2*(1 - p3) + (1 - p1)*p2*(1 - p3))*P1101
    P0101 == (1 - p1)*(1 - p2)*P0100 + (1 - p1)*p3*P0001 + p1*(1 - p2)*P1100 + ((1 - p1)*(1 - p2)*(1 - p3) + p1*p2*p3)*P0101 + (1 - p1)*(1 - p3)*P0011 + p1*p2*(1 - p3)*P0111 + p1*(1 - p2)*(1 - p3)*P1101
    P0011 == p1*(1 - p2)*p3*P0101 + p1*(1 - p2)*p3*P0011 + (p1*(1 - p2)*(1 - p3) + p1*(1 - p2)*p3)*P0111
    P1101 == (1 - p1)*(1 - p2)*P1100 + (1 - p1)*(1 - p2)*(1 - p3)*P0101 + ((1 - p1)*(1 - p2)*(1 - p3) + p1*p2*p3 + (1 - p1)*p2*p3)*P1101 + (1 - p1)*p2*(1 - p3)*P0111 + (p1*p2*(1 - p3) + (1 - p1)*p2*(1 - p3))*P1111
    P0111 == (1 - p1)*(1 - p2)*p3*P0101 + (1 - p1)*(1 - p2)*p3*P0011 + ((1 - p1)*(1 - p2)*(1 - p3) + (1 - p1)*(1 - p2)*p3 + p1*p2*p3)*P0111 + p1*(1 - p2)*p3*P1101 + (p1*(1 - p2)*(1 - p3) + p1*(1 - p2)*p3)*P1111
    P1111 == (1 - p1)*(1 - p2)*p3*P1101 + (1 - p1)*p2*p3*P0111 + ((1 - p1)*(1 - p2)*(1 - p3) + (1 - p1)*(1 - p2)*p3 + p1*p2*p3 + (1 - p1)*p2*p3)*P1111
    P0000 + P0100 + P0001 + P1100 + P0101 + P0011 + P1101 + P0111 + P1111 == 1
    # solver
    Find(P0000, P0100, P0001, P1100, P0101, P0011, P1101, P0111, P1111) = [0.00178935; 0.0438111; 0.0159935; 0.169358; 0.090223; 0.0292248; 0.248067; 0.140401; 0.26113]
end solve block
solve block
    # guess values
    P0000 := 0.002
    P0100 := 0.044
    P0001 := 0.016
    P1100 := 0.169
    P0101 := 0.09
    P0011 := 0.029
    P1101 := 0.248
    P0111 := 0.14
    P1111 := 0.261
    p1 := 0.3
    p2 := 0.55
    p3 := 0.65
    A := 0
    Q := 0
    Pot := 0
    Pbl := 0
    Lc := 0
    Wc := 0
    # constraints
    A == (1 - p1)*P0000*P0100*P0001*P1100*P0101*P0011*P1101*P0111*P1111
    Q == A/0.5
    Pot == 1 - Q
    Lc == 1
    # solver
    Find(A, Q, Pot, Pbl, Lc, Wc) = [3.93956e-12; 7.87913e-12; 1; 0; 1; 0]
end solve block
